# 14.1
# The following observed values for the lines in Figure 14.2 are given:
# AU = 2828.83 ft  BU = 2031.55 ft CU = 2549.83 ft
# The control coordinates of A, B, and C are
# Station x (ft) y (ft)
# A 1418.17 4747.14
# B 2434.53 3504.91
# C 3234.86 2105.56
# What are the most probable values for the adjusted coordinates of
# station U?
x_a := 1418.17
x_b := 2434.53
x_c := 3234.86
y_a := 4747.14
y_b := 3504.91
y_c := 2105.56
# 計算站點U的估計坐標
# step1:計算ab方位角
Az_AB := atan((x_b - x_a)/(y_b - y_a)) + 180°  # error: 此值必須為實數。
